*Heading
** Job name: Job-elastoplastic Model name: Model-1-Copy
** Generated by: Abaqus/CAE 2023
*Preprint, echo=NO, model=NO, history=NO, contact=NO
**
** PARTS
**
*Part, name=Part-1
*Node
      1,   1385.81934,   574.025146,           0.
      2,   1190.03003,   913.142151,           0.
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*Element, type=C3D8
   1,  472,  430,  357,   39, 1808, 1766, 1693, 1375
   2,  531,  472,   39,   38, 1867, 1808, 1375, 1374
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*End Part
*Nset, nset=Set-BC
   51,  100,  101,  102,  103,  104
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*Nset, nset=Set-Fx
   52,   53,   54,   55,   56,   57
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*End Assembly
**
** MATERIALS
**
*Material, name=C60_elastoplastic
*Elastic
36000., 0.2
*Plastic
10.,    0.
15., 0.001
** ----------------------------------------------------------------
**
** STEP: Step-1
**
*Step, name=Step-1, nlgeom=NO
*Boundary
Set-BC, 1, 0
Set-BC, 2, 0
Set-BC, 3, 0
**
** LOADS
**
** Name: Load-1   Type: Concentrated force
*Load
Set-Fx, 1, 100000.
*End Step
