*Node
      1,           0.,         -0.5,           1.
      2,           0., -0.300000012,           1.
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*Element, type=C3D8R
  1,  37,  38,  44,  43,   1,   2,   8,   7
  2,  38,  39,  45,  44,   2,   3,   9,   8
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
*Material, name=Material-1
2.1e+09, 0.3

*Load
6,2,-500
12,2,-500
18,2,-500
24,2,-500
30,2,-500
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936,2,-500

*Boundary
1,1,0
1,2,0
1,3,0
2,1,0
2,2,0
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36,3,0
