*Node
      1,         -25.,         -10.,           5.
      2,         -25.,           0.,           5.
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*Element, type=C3D8
 1,  21,  62,  16,   1, 106, 147, 101,  86
 2,  62,  17,   2,  16, 147, 102,  87, 101
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
*Material, name=Material-1
20000., 0.2

*Constr
3, 1, 0
3, 2, 0
3, 3, 0
4, 1, 0
4, 2, 0
4, 3, 0
8, 1, 0
8, 2, 0
8, 3, 0
19, 1, 0
19, 2, 0
19, 3, 0
34, 1, 0
34, 2, 0
34, 3, 0
88, 1, 0
88, 2, 0
88, 3, 0
89, 1, 0
89, 2, 0
89, 3, 0
93, 1, 0
93, 2, 0
93, 3, 0
104, 1, 0
104, 2, 0
104, 3, 0
119, 1, 0
119, 2, 0
119, 3, 0

*Load
13, 1, 100
14, 1, 100
15, 1, 100
58, 1, 100
59, 1, 100
98, 1, 100
99, 1, 100
100, 1, 100
143, 1, 100
144, 1, 100
