*Heading
** Job name: Job-1 Model name: Model-1
** Generated by: Abaqus/CAE 2024
*Preprint, echo=NO, model=NO, history=NO, contact=NO
**
** PARTS
**
*Part, name=Part-1
*Node
      1,   4.61939764,   1.91341722,           0.
      2,   1.91341722,   4.61939764,           0.
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*Element, type=C3D8
   1,  114,  321,   12,  336,  965, 1172,  863, 1187
   2,  336,  767,  187,  445, 1187, 1618, 1038, 1296
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
*Nset, nset=Set-1
   81,   82,   83,   84,   85,   86
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*Elset, elset=Set-1
  208,  210,  214,  219,  220,  303
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*Nset, nset=Set-2
 4304,
*Nset, nset=Set-3
   81,   82,   83,   84,   85,   86
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*Nset, nset=Set-4
   41,   42,   43,   44,   45,   46
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
*Material, name=Material-1
*Elastic
20000., 0.2

*Boundary
Set-3, 1, 0
Set-3, 2, 0
Set-3, 3, 0

*Load
Set-4, 1, 100.
